# Отображение и сравнение работы двух сборок CFFT путем
# сравнения дампов
# ExactFFT - VERSION 8.00
dump1 := "VS_C.dump\"  # Частота семплирования:
dump2 := ".NET.dump\"
fs := 36000
# Вектор перестановок:
FFT_P_1 := READBIN(concat(dump1, "FFT_P.int32"), "int32")
FFT_P_2 := READBIN(concat(dump2, "FFT_P.int32"), "int32")
|vectorize(FFT_P_1 - FFT_P_2)| = 0
FFT_P_1 - FFT_P_2 = [
    0; 0; 0; 0; 0; 0; 0; 0; 0; 0
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]
FFT_P_1 = [
    0; 1; 4096; 4097; 2048; 2049; 6144; 6145; 1024; 1025
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]
FFT_P_2 = [
    0; 1; 4096; 4097; 2048; 2049; 6144; 6145; 1024; 1025
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]
# Вектор перестановок:
FFT_PP_1 := READBIN(concat(dump1, "FFT_PP.int32"), "int32")
FFT_PP_2 := READBIN(concat(dump2, "FFT_PP.int32"), "int32")
|vectorize(FFT_PP_1 - FFT_PP_2)| = 0
FFT_PP_1 - FFT_PP_2 = [
    0; 0; 0; 0; 0; 0; 0; 0; 0; 0
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]
FFT_PP_1 = [
    0; 1; 2048; 2049; 1024; 1025; 3072; 3073; 512; 513
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]
FFT_PP_2 = [
    0; 1; 2048; 2049; 1024; 1025; 3072; 3073; 512; 513
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]
# Взвешивающее окно:
FFT_TW_1 := READBIN(concat(dump1, "FFT_TW.double"), "double")
FFT_TW_2 := READBIN(concat(dump2, "FFT_TW.double"), "double")
|vectorize(FFT_TW_1 - FFT_TW_2)| = 1.9724e-16
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FFT_TW_1 = [
    6e-5; 6e-5; 6.00333e-5; 6.00333e-5; 6.01331e-5; 6.01331e-5; 6.02996e-5; 6.02996e-5; 6.05326e-5; 6.05326e-5
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]
# Входной сигнал для FFT:
FFT_S_1 := READBIN(concat(dump1, "FFT_S.double"), "double")
FFT_S_2 := READBIN(concat(dump2, "FFT_S.double"), "double")
rows(FFT_S_1) = 8192
rows(FFT_S_2) = 8192
|vectorize(FFT_S_1 - FFT_S_2)| = 0
i := 0 .. rows(FFT_S_1) - 1
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FFT_S_1 = [
    0; 0; 19261; 0; 31164; 19261; 31164; 31164; 19261; 31164
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]
FFT_S_2 = [
    0; 0; 19261; 0; 31164; 19261; 31164; 31164; 19261; 31164
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]
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# Результат работы FFT:
FFT_T_1 := READBIN(concat(dump1, "FFT_T.double"), "double")
FFT_T_2 := READBIN(concat(dump2, "FFT_T.double"), "double")
FFT_T_diff := vectorize(|FFT_T_1 - FFT_T_2|)
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rows(FFT_T_1) = 8192
rows(FFT_T_2) = 8192
|vectorize(FFT_T_1 - FFT_T_2)| = 4.3034e-13
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FFT_T_1 = [
    0.00147341; 0.00147341; 0.00147455; 0.00147455; 0.00147569; 0.00147569; 0.00147686; 0.00147686; 0.00147804; 0.00147804
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]
FFT_T_2 = [
    0.00147341; 0.00147341; 0.00147455; 0.00147455; 0.00147569; 0.00147569; 0.00147686; 0.00147686; 0.00147804; 0.00147804
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]
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# Магнитуды:
MagL_1 := READBIN(concat(dump1, "MagL.double"), "double")
MagR_1 := READBIN(concat(dump1, "MagR.double"), "double")
MagL_2 := READBIN(concat(dump2, "MagL.double"), "double")
MagR_2 := READBIN(concat(dump2, "MagR.double"), "double")
|vectorize(MagL_1 - MagL_2)| = 1.47437e-13
|vectorize(MagR_1 - MagR_2)| = 1.57301e-13
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MagL_1 = [
    0.00147341; 0.00147342; 0.00147345; 0.00147349; 0.00147355; 0.00147363; 0.00147372; 0.00147383; 0.00147396; 0.0014741
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]
MagL_2 = [
    0.00147341; 0.00147342; 0.00147345; 0.00147349; 0.00147355; 0.00147363; 0.00147372; 0.00147383; 0.00147396; 0.0014741
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]
MagR_1 = [
    0.00147341; 0.00147342; 0.00147345; 0.00147349; 0.00147355; 0.00147363; 0.00147372; 0.00147383; 0.00147396; 0.0014741
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]
MagR_2 = [
    0.00147341; 0.00147342; 0.00147345; 0.00147349; 0.00147355; 0.00147363; 0.00147372; 0.00147383; 0.00147396; 0.0014741
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]
MagLR_diff := vectorize(|MagL_1 - MagL_2|)
|vectorize(MagL_1 - MagL_2)| = 1.47437e-13
max(vectorize(|MagL_1 - MagL_2|)) = 6.19205e-14
# Максимальная гармоника:
findMaxIdx(data) :=
    max_data ← max(data)
    for i ∈ 0 .. length(data)
        return i if data[i] == max_data
max_harm_idx_1 := findMaxIdx(MagL_1) = 410
max_harm_idx_2 := findMaxIdx(MagL_2) = 410
|vectorize(max_harm_idx_1 - max_harm_idx_2)| = 0
# Разность хода фаз:
PhaseLR_1 := READBIN(concat(dump1, "PhaseLR.double"), "double")
PhaseLR_2 := READBIN(concat(dump2, "PhaseLR.double"), "double")
|vectorize(PhaseLR_1 - PhaseLR_2)| = 1.71036e-8
PhaseLR_deg_1 := PhaseLR_1*180/π
PhaseLR_deg_1[max_harm_idx_1] = -36
max_harm_freq_1 := 2*max_harm_idx_1/length(FFT_TW_1)*fs = 3603.52  # Гц
PhaseLR_deg_1 = [
    0; -0.0874033; -0.174807; -0.26221; -0.349613; -0.437016; -0.524419; -0.611822; -0.699225; -0.786628
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]
PhaseLR_deg_2 := PhaseLR_2*180/π
PhaseLR_deg_2[max_harm_idx_2] = -36
max_harm_freq_2 := 2*max_harm_idx_2/length(FFT_TW_2)*fs = 3603.52  # Гц
# Визуализируем разность хода фаз по каналам:
PhaseLR_diff := vectorize(|PhaseLR_1 - PhaseLR_2|)
|vectorize(PhaseLR_1 - PhaseLR_2)| = 1.71036e-8
max(vectorize(|PhaseLR_1 - PhaseLR_2|)) = 9.86017e-9
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# Комплексные магнитуды:
MagС_1 := READBIN(concat(dump1, "MagC.double"), "double")
MagС_2 := READBIN(concat(dump2, "MagC.double"), "double")
|vectorize(MagС_1 - MagС_2)| = 3.11249e-13
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MagL_1 = [
    0.00147341; 0.00147342; 0.00147345; 0.00147349; 0.00147355; 0.00147363; 0.00147372; 0.00147383; 0.00147396; 0.0014741
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]
MagL_2 = [
    0.00147341; 0.00147342; 0.00147345; 0.00147349; 0.00147355; 0.00147363; 0.00147372; 0.00147383; 0.00147396; 0.0014741
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]
MagLR_diff := vectorize(|MagL_1 - MagL_2|)
|vectorize(MagL_1 - MagL_2)| = 1.47437e-13
# Зеркалирование спектра: | Выделение результатов оконного преобразования Фурье:
SpectrumMirror(S) :=
    N ← cols(S)
    for k ∈ 0 .. N/2 - 1
        SM[:, k] ← S[:, N/2 - k - 1]
        SM[:, N/2 + k] ← S[:, N - k - 1]
    SM
Mag(V) := vectorize(|V|)
# Тест на совместимость с CFFT (MathCAD): | Взвешивающие окна без комплексного дублирования:
x := 0, 2 .. rows(FFT_S_1) - 1
FFT_S_1_Re[x/2] := FFT_S_1[x + 0]
FFT_S_2_Re[x/2] := FFT_S_2[x + 0]
FFT_TW_1_Norm[x/2] := FFT_TW_1[x + 0]
FFT_S_1_Im[x/2] := FFT_S_1[x + 1]
FFT_S_2_Im[x/2] := FFT_S_2[x + 1]
FFT_TW_2_Norm[x/2] := FFT_TW_2[x + 0]
FFT_S_CFFT_1 := CFFT(vectorize(FFT_TW_1_Norm*FFT_S_1_Re) + vectorize(FFT_TW_1_Norm*sqrt(-1)*FFT_S_1_Im))
FFT_S_CFFT_2 := CFFT(vectorize(FFT_TW_1_Norm*FFT_S_1_Re) + vectorize(FFT_TW_1_Norm*sqrt(-1)*FFT_S_1_Im))
FFT_S_CFFT_1_Mag := transpose(SpectrumMirror(transpose(Mag(FFT_S_CFFT_1))))
FFT_S_CFFT_2_Mag := transpose(SpectrumMirror(transpose(Mag(FFT_S_CFFT_2))))
# Сравнение преобразования в С и C# c MathCAD:
|vectorize(MagС_1 - MagС_2)| = 3.11249e-13
|vectorize(FFT_S_CFFT_1_Mag - MagС_1)| = 1.4569e-11
|vectorize(FFT_S_CFFT_2_Mag - MagС_2)| = 1.45709e-11
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# Самодиагностика (разбор структуры CFFT_SelfTestResult):
AllOK_1 := READBIN(concat(dump1, "AllOK.int32"), "int32")[0] = 1
maxDiff_ACH_1 := READBIN(concat(dump1, "MaxDiff_ACH.double"), "double")[0] = 1.45615e-8
maxDiff_ALG_to_EXP_to_ALG_1 := READBIN(concat(dump1, "MaxDiff_ALG_to_EXP_to_ALG.double"), "double")[0] = 5.82077e-11
maxDiff_FORWARD_BACKWARD_1 := READBIN(concat(dump1, "MaxDiff_FORWARD_BACKWARD.double"), "double")[0] = 2.6077e-8
maxDiff_FORWARD_BACKWARD_AntiTW_1 := READBIN(concat(dump1, "MaxDiff_FORWARD_BACKWARD_AntiTW.double"), "double")[0] = 2.23517e-8
maxDiff_PhaseLR_1 := READBIN(concat(dump1, "MaxDiff_PhaseLR.double"), "double")[0] = 7.58282e-12
AllOK_2 := READBIN(concat(dump2, "AllOK.int32"), "int32")[0] = 1
maxDiff_ACH_2 := READBIN(concat(dump2, "MaxDiff_ACH.double"), "double")[0] = 5.8119e-9
maxDiff_ALG_to_EXP_to_ALG_2 := READBIN(concat(dump2, "MaxDiff_ALG_to_EXP_to_ALG.double"), "double")[0] = 5.82077e-11
maxDiff_FORWARD_BACKWARD_2 := READBIN(concat(dump2, "MaxDiff_FORWARD_BACKWARD.double"), "double")[0] = 2.23517e-8
maxDiff_FORWARD_BACKWARD_AntiTW_2 := READBIN(concat(dump2, "MaxDiff_FORWARD_BACKWARD_AntiTW.double"), "double")[0] = 2.42144e-8
maxDiff_PhaseLR_2 := READBIN(concat(dump2, "MaxDiff_PhaseLR.double"), "double")[0] = 6.11466e-12
# Производительность:
CFFT_Process_time_1 := READBIN(concat(dump1, "CFFT_Process_time.double"), "double")[0] = 0.000276491  # с
CFFT_Process_time_2 := READBIN(concat(dump2, "CFFT_Process_time.double"), "double")[0] = 0.000333841  # с
CFFT_Explore_time_1 := READBIN(concat(dump1, "CFFT_Explore_time.double"), "double")[0] = 0.000475589  # с
CFFT_Explore_time_2 := READBIN(concat(dump2, "CFFT_Explore_time.double"), "double")[0] = 0.000333841  # с
# Скорость в X:
performanceSampleRate := 44100
FFT_WindowSize := rows(FFT_T_1)/2 = 4096
OneXSpeed := performanceSampleRate/FFT_WindowSize = 10.7666
CFFT_Speed_STEREO_1 := 1/(CFFT_Process_time_1 + CFFT_Explore_time_1*OneXSpeed) = 185.289  # X  # VS_C
CFFT_Speed_STEREO_2 := 1/(CFFT_Process_time_2 + CFFT_Explore_time_2*OneXSpeed) = 254.572  # X  # .NET
# Точная частота:
exactFreq_1 := READBIN(concat(dump1, "exactFreq.double"), "double")
exactFreq_2 := READBIN(concat(dump2, "exactFreq.double"), "double")
trueFreq_1 := READBIN(concat(dump1, "trueFreq.double"), "double")
trueFreq_2 := READBIN(concat(dump2, "trueFreq.double"), "double")
|exactFreq_1 - trueFreq_1| = 0.000130458
|exactFreq_2 - trueFreq_2| = 0.000130458
